# OpenSim document version 30000
ForceSet LowerBody_RRA:
  defaults: CoordinateActuator default: optimal_force=100
  PointActuator FX: body=pelvis point=(-0.069901 0 0) direction=(1 0 0) optimal_force=800
  PointActuator FY: body=pelvis point=(-0.069901 0 0) direction=(0 1 0) optimal_force=800
  PointActuator FZ: body=pelvis point=(-0.069901 0 0) direction=(0 0 1) optimal_force=800
  TorqueActuator MX: bodyA=pelvis bodyB=ground axis=(1 0 0) optimal_force=800 direction=(1 0 0)
  TorqueActuator MY: bodyA=pelvis bodyB=ground axis=(0 1 0) optimal_force=800 direction=(0 1 0)
  TorqueActuator MZ: bodyA=pelvis bodyB=ground axis=(0 0 1) optimal_force=800 direction=(0 0 1)
  CoordinateActuator [values shared by the 23 below unless stated]: min_control=-1 max_control=1 optimal_force=800
  CoordinateActuator hip_flexion_r_reserve: coordinate=hip_flexion_r optimal_force=20
  CoordinateActuator hip_adduction_r_reserve: coordinate=hip_adduction_r optimal_force=20
  CoordinateActuator hip_rotation_r_reserve: coordinate=hip_rotation_r
  CoordinateActuator knee_angle_r_reserve: coordinate=knee_angle_r
  CoordinateActuator ankle_angle_r_reserve: coordinate=ankle_angle_r
  CoordinateActuator hip_flexion_l_reserve: coordinate=hip_flexion_l
  CoordinateActuator hip_adduction_l_reserve: coordinate=hip_adduction_l
  CoordinateActuator hip_rotation_l_reserve: coordinate=hip_rotation_l
  CoordinateActuator knee_angle_l_reserve: coordinate=knee_angle_l
  CoordinateActuator ankle_angle_l_reserve: coordinate=ankle_angle_l
  CoordinateActuator lumbar_extension_reserve: coordinate=lumbar_extension
  CoordinateActuator lumbar_bending_reserve: coordinate=lumbar_bending
  CoordinateActuator lumbar_rotation_reserve: coordinate=lumbar_rotation
  CoordinateActuator arm_flex_r: coordinate=arm_flex_r
  CoordinateActuator arm_add_r: coordinate=arm_add_r
  CoordinateActuator arm_rot_r: coordinate=arm_rot_r
  CoordinateActuator elbow_flex_r: coordinate=elbow_flex_r
  CoordinateActuator pro_sup_r: coordinate=pro_sup_r
  CoordinateActuator arm_flex_l: coordinate=arm_flex_l
  CoordinateActuator arm_add_l: coordinate=arm_add_l
  CoordinateActuator arm_rot_l: coordinate=arm_rot_l
  CoordinateActuator elbow_flex_l: coordinate=elbow_flex_l
  CoordinateActuator pro_sup_l: coordinate=pro_sup_l
