# OpenSim document version 10600
AnalyzeTool athlete_0_scaled_increased_force_3:
  model_file: ../athlete_0_increased_force_3.osim
  replace_actuator_set: false
  actuator_set_files: actuators_so.xml
  replace_contact_force_set: true
  output_precision: 4
  results_directory: ./unlocked
  initial_time: 6.5
  final_time: 9
  solve_for_equilibrium_for_auxiliary_states: false
  maximum_number_of_integrator_steps: 20000
  maximum_integrator_step_size: 1
  integrator_error_tolerance: 1e-7
  integrator_fine_tolerance: 1e-10
  controls_file: athlete_0_scaled_increased_force_3_StaticOptimization_controls.xml
  coordinates_file: athlete_0_scaled_increased_force_3_Kinematics_q.sto
  speeds_file: athlete_0_scaled_increased_force_3_Kinematics_u.sto
  external_loads_model_kinematics_file: ik.mot
  external_loads_body1: calcn_r
  external_loads_body2: calcn_l
  lowpass_cutoff_frequency_for_load_kinematics: 6
  # MODEL AND ACTUATORS
  # BASIC SETTINGS
  # INTEGRATOR SETTINGS
  # INPUT FILES
  # ANALYSES
  AnalysisSet Analyses:
    InducedAccelerations: step_interval=40 in_degrees=true coordinate_names=knee_angle_r body_names=center_of_mass
        constraint_type=roll force_threshold=15
      ConstraintSet:
        PointConstraint
  # EXTERNAL LOADS
