# OpenSim document version 40500
AnalyzeTool Athlete0_scaled:
  model_file: /Users/marcelhacker/Documents/opensim-deadlift-techniques/athlete_0/motion/sumo_dl_emptybar/SO/../../../model/jointcenters/scale_model_increased_force_3.osim
  replace_force_set: false
  force_set_files: actuators_so.xml
  results_directory: Sum_Activation_2
  output_precision: 8
  initial_time: 9.1
  final_time: 12.6
  solve_for_equilibrium_for_auxiliary_states: false
  maximum_number_of_integrator_steps: 20000
  maximum_integrator_step_size: 1
  minimum_integrator_step_size: 1e-8
  integrator_error_tolerance: 1e-5
  external_loads_file: /Users/marcelhacker/Documents/opensim-deadlift-techniques/athlete_0/motion/sumo_dl_emptybar/SO/../ID/grf.xml
  coordinates_file: /Users/marcelhacker/Documents/opensim-deadlift-techniques/athlete_0/motion/sumo_dl_emptybar/SO/../IK/ik.mot
  lowpass_cutoff_frequency_for_coordinates: 7
  AnalysisSet Analyses:
    StaticOptimization: start_time=9.1 end_time=12.6 step_interval=1 in_degrees=true use_model_force_set=true
        activation_exponent=2 use_muscle_physiology=true optimizer_convergence_criterion=0.0001
        optimizer_max_iterations=100
