# OpenSim document version 40500
ExternalLoads:
  datafile: grf.mot
  external_loads_model_kinematics_file: ik.mot
  lowpass_cutoff_frequency_for_load_kinematics: 7
  ExternalForce externalforce_1: applied_to_body=ground force_expressed_in_body=ground force_identifier=f1_
      point_identifier=p1_ torque_identifier=m1_
  ExternalForce externalforce_2: applied_to_body=ground force_expressed_in_body=ground force_identifier=f2_
      point_identifier=p2_ torque_identifier=m2_
  ExternalForce externalforce_3: applied_to_body=calcn_l force_expressed_in_body=ground force_identifier=f3_
      point_identifier=p3_ torque_identifier=m3_
  ExternalForce externalforce_4: applied_to_body=ground force_expressed_in_body=ground force_identifier=f4_
      point_identifier=p4_ torque_identifier=m4_
  ExternalForce externalforce_5: applied_to_body=calcn_r force_expressed_in_body=ground force_identifier=f5_
      point_identifier=p5_ torque_identifier=m5_
