# OpenSim document version 30000
ScaleTool Catelli_high_hip_flexion:
  mass: 200.5
  height: -1
  age: -1
  ModelScaler:
    apply: true
    scaling_order: manualScale
    time_range: -1 -1
    preserve_mass_distribution: false
    ScaleSet:
      Scale: scales=([0.82857335 0.82857335 0.82857335]) segment=pelvis apply=true
      Scale: scales=([0.80486258 0.80486258 0.80486258]) segment=femur_r apply=true
      Scale: scales=([0.96683045 0.96683045 0.96683045]) segment=tibia_r apply=true
      Scale: scales=([0.80486258 0.80486258 0.80486258]) segment=patella_r apply=true
      Scale: scales=([0.90016538 0.90016538 0.90016538]) segment=talus_r apply=true
      Scale: scales=([0.90016538 0.90016538 0.90016538]) segment=calcn_r apply=true
      Scale: scales=([0.90016538 0.90016538 0.90016538]) segment=toes_r apply=true
      Scale: scales=([0.8219108 0.8219108 0.8219108]) segment=femur_l apply=true
      Scale: scales=([0.94279418 0.94279418 0.94279418]) segment=tibia_l apply=true
      Scale: scales=([0.8219108 0.8219108 0.8219108]) segment=patella_l apply=true
      Scale: scales=([0.9018537 0.9018537 0.9018537]) segment=talus_l apply=true
      Scale: scales=([0.9018537 0.9018537 0.9018537]) segment=calcn_l apply=true
      Scale: scales=([0.9018537 0.9018537 0.9018537]) segment=toes_l apply=true
      Scale: scales=([0.89496121 0.89496121 0.89496121]) segment=torso apply=true
      Scale: scales=([0.82268562 0.82268562 0.82268562]) segment=humerus_r apply=true
      Scale: scales=([0.92381125 0.92381125 0.92381125]) segment=ulna_r apply=true
      Scale: scales=([0.92925432 0.92925432 0.92925432]) segment=radius_r apply=true
      Scale: scales=([0.95369965 0.95369965 0.95369965]) segment=hand_r apply=true
      Scale: scales=([0.79228692 0.79228692 0.79228692]) segment=humerus_l apply=true
      Scale: scales=([0.94019042 0.94019042 0.94019042]) segment=ulna_l apply=true
      Scale: scales=([0.94065137 0.94065137 0.94065137]) segment=radius_l apply=true
      Scale: scales=([0.91348737 0.91348737 0.91348737]) segment=hand_l apply=true
  MarkerPlacer:
    apply: false
    time_range: -1 -1
    max_marker_movement: -1
    IKTaskSet:
      IKMarkerTask RSHO: apply=true weight=1
      IKMarkerTask LSHO: apply=true weight=1
      IKMarkerTask C7: apply=true weight=1
      IKMarkerTask CLAV: apply=true weight=1
      IKMarkerTask RBAK: apply=true weight=1
      IKMarkerTask RUPA: apply=true weight=1
      IKMarkerTask RELB: apply=true weight=1
      IKMarkerTask RFRA: apply=true weight=1
      IKMarkerTask RWRA: apply=true weight=1
      IKMarkerTask RWRB: apply=true weight=1
      IKMarkerTask LUPA: apply=true weight=1
      IKMarkerTask LELB: apply=true weight=1
      IKMarkerTask LFRA: apply=true weight=1
      IKMarkerTask LWRA: apply=true weight=1
      IKMarkerTask LWRB: apply=true weight=1
      IKMarkerTask RASI: apply=true weight=1
      IKMarkerTask LASI: apply=true weight=1
      IKMarkerTask RPSI: apply=true weight=1
      IKMarkerTask LPSI: apply=true weight=1
      IKMarkerTask LHJC: apply=true weight=1
      IKMarkerTask RHJC: apply=true weight=1
      IKMarkerTask RTHI: apply=true weight=1
      IKMarkerTask RLKN: apply=true weight=1
      IKMarkerTask RMKN: apply=true weight=1
      IKMarkerTask RKJC: apply=true weight=1
      IKMarkerTask RTIB: apply=true weight=1
      IKMarkerTask RLAN: apply=true weight=1
      IKMarkerTask RMAN: apply=true weight=1
      IKMarkerTask RAJC: apply=true weight=1
      IKMarkerTask RHEE: apply=true weight=1
      IKMarkerTask RTOE: apply=true weight=1
      IKMarkerTask LTHI: apply=true weight=1
      IKMarkerTask LLKN: apply=true weight=1
      IKMarkerTask LMKN: apply=true weight=1
      IKMarkerTask LKJC: apply=true weight=1
      IKMarkerTask LTIB: apply=true weight=1
      IKMarkerTask LLAN: apply=true weight=1
      IKMarkerTask LMAN: apply=true weight=1
      IKMarkerTask LAJC: apply=true weight=1
      IKMarkerTask LHEE: apply=true weight=1
      IKMarkerTask LTOE: apply=true weight=1
      IKMarkerTask STRN: apply=true weight=1
      IKMarkerTask RLAS: apply=true weight=1
      IKMarkerTask LLAS: apply=true weight=1
      IKMarkerTask T10: apply=true weight=1
      IKMarkerTask LFHD: apply=true weight=1
      IKMarkerTask RBHD: apply=true weight=1
      IKMarkerTask LBHD: apply=true weight=1
      IKMarkerTask RFHD: apply=true weight=1
      IKMarkerTask LFIN: apply=true weight=1
      IKMarkerTask RFIN: apply=true weight=1
