# OpenSim document version 40000
AnalyzeTool:
  model_file: ..\..\..\Scaled_models\Athlete_03_scaled.osim
  replace_force_set: false
  force_set_files: actuators_so.xml
  results_directory: .
  output_precision: 8
  initial_time: 2.165
  final_time: 6.095
  solve_for_equilibrium_for_auxiliary_states: false
  maximum_number_of_integrator_steps: 20000
  maximum_integrator_step_size: 1
  minimum_integrator_step_size: 1e-8
  integrator_error_tolerance: 1e-5
  external_loads_file: .\GRF.xml
  coordinates_file: C:\Git\isbs2024\Data\Simulations\Athlete_03\sq_90\IK.mot
  lowpass_cutoff_frequency_for_coordinates: 6
  AnalysisSet Analyses:
    StaticOptimization: start_time=2.165 end_time=6.095 step_interval=4 in_degrees=true use_model_force_set=true
        activation_exponent=2 use_muscle_physiology=true optimizer_convergence_criterion=0.0001
        optimizer_max_iterations=25
