# OpenSim document version 40000
ScaleTool Athlete_11:
  mass: 65.5 [kg]
  height: -1
  age: -1
  ModelScaler:
    apply: true
    scaling_order: measurements
    marker_file: marker_experimental.trc
    time_range: 0 5.47
    preserve_mass_distribution: true
    MeasurementSet:
      Measurement Pelvis: apply=true
        MarkerPair: markers=(RASI LASI)
        BodyScale pelvis: axes=(X Y Z)
        BodyScale sacrum: axes=(X Y Z)
      Measurement Head: apply=true
        MarkerPair: markers=(RFHD LFHD)
        BodyScale head_neck: axes=(X Y Z)
      Measurement Humerus_r: apply=true
        MarkerPair: markers=(RACR RCUBL)
        BodyScale humerus_R: axes=(X Y Z)
      Measurement Ulna_r: apply=false
        MarkerPair: markers=(RCUBM RWRU)
      Measurement Radius_r: apply=true
        MarkerPair: markers=(RCUBL RWRR)
        BodyScale ulna_R: axes=(X Y Z)
        BodyScale radius_R: axes=(X Y Z)
      Measurement Clavicle_r: apply=true
        MarkerPair: markers=(STRN RACR)
        BodyScale clavicle_R: axes=(X Y Z)
      Measurement Femur_r: apply=true
        MarkerPair: markers=(RASI RKNEL)
        BodyScale femur_r: axes=(X Y Z)
        BodyScale patella_r: axes=(X Y Z)
      Measurement Tibia_r: apply=true
        MarkerPair: markers=(RFIB RMALL)
        BodyScale tibia_r: axes=(X Y Z)
      Measurement Hand_r: apply=true
        MarkerPair: markers=(RWRU RWRR)
        BodyScale hand_R: axes=(X Y Z)
      Measurement Thorax: apply=true
        MarkerPair: markers=(C7 T12)
        MarkerPair: markers=(T12 LPSI)
        BodyScale Abdomen: axes=(X Y Z)
        BodyScale lumbar5: axes=(X Y Z)
        BodyScale lumbar4: axes=(X Y Z)
        BodyScale lumbar3: axes=(X Y Z)
        BodyScale lumbar2: axes=(X Y Z)
        BodyScale lumbar1: axes=(X Y Z)
        BodyScale thoracic12: axes=(X Y Z)
        BodyScale thoracic11: axes=(X Y Z)
        BodyScale thoracic10: axes=(X Y Z)
        BodyScale thoracic9: axes=(X Y Z)
        BodyScale thoracic8: axes=(X Y Z)
        BodyScale thoracic7: axes=(X Y Z)
        BodyScale thoracic6: axes=(X Y Z)
        BodyScale thoracic5: axes=(X Y Z)
        BodyScale thoracic4: axes=(X Y Z)
        BodyScale thoracic3: axes=(X Y Z)
        BodyScale thoracic2: axes=(X Y Z)
        BodyScale thoracic1: axes=(X Y Z)
        BodyScale rib12_R: axes=(X Y Z)
        BodyScale rib11_R: axes=(X Y Z)
        BodyScale rib10_R: axes=(X Y Z)
        BodyScale rib9_R: axes=(X Y Z)
        BodyScale rib8_R: axes=(X Y Z)
        BodyScale rib7_R: axes=(X Y Z)
        BodyScale rib6_R: axes=(X Y Z)
        BodyScale rib5_R: axes=(X Y Z)
        BodyScale rib4_R: axes=(X Y Z)
        BodyScale rib3_R: axes=(X Y Z)
        BodyScale rib2_R: axes=(X Y Z)
        BodyScale rib1_R: axes=(X Y Z)
        BodyScale rib12_L: axes=(X Y Z)
        BodyScale rib11_L: axes=(X Y Z)
        BodyScale rib10_L: axes=(X Y Z)
        BodyScale rib9_L: axes=(X Y Z)
        BodyScale rib8_L: axes=(X Y Z)
        BodyScale rib7_L: axes=(X Y Z)
        BodyScale rib6_L: axes=(X Y Z)
        BodyScale rib5_L: axes=(X Y Z)
        BodyScale rib4_L: axes=(X Y Z)
        BodyScale rib3_L: axes=(X Y Z)
        BodyScale rib2_L: axes=(X Y Z)
        BodyScale rib1_L: axes=(X Y Z)
        BodyScale sternum: axes=(X Y Z)
        BodyScale scapula_R: axes=(X Y Z)
        BodyScale scapula_L: axes=(X Y Z)
        BodyScale Abd_L_L1: axes=(X Y Z)
        BodyScale Abd_L_L2: axes=(X Y Z)
        BodyScale Abd_L_L3: axes=(X Y Z)
        BodyScale Abd_L_L4: axes=(X Y Z)
        BodyScale Abd_L_L5: axes=(X Y Z)
        BodyScale Abd_R_L1: axes=(X Y Z)
        BodyScale Abd_R_L2: axes=(X Y Z)
        BodyScale Abd_R_L3: axes=(X Y Z)
        BodyScale Abd_R_L4: axes=(X Y Z)
        BodyScale Abd_R_L5: axes=(X Y Z)
      Measurement Humerus_l: apply=true
        MarkerPair: markers=(LACR LCUBL)
        BodyScale humerus_L: axes=(X Y Z)
      Measurement Ulna_l: apply=false
        MarkerPair: markers=(LCUBM LWRU)
      Measurement Radius_l: apply=true
        MarkerPair: markers=(LCUBL LWRR)
        BodyScale ulna_L: axes=(X Y Z)
        BodyScale radius_L: axes=(X Y Z)
      Measurement Clavicle_l: apply=true
        MarkerPair: markers=(STRN LACR)
        BodyScale clavicle_L: axes=(X Y Z)
      Measurement Femur_l: apply=true
        MarkerPair: markers=(LASI LKNEL)
        BodyScale femur_l: axes=(X Y Z)
        BodyScale patella_l: axes=(X Y Z)
      Measurement Tibia_l: apply=true
        MarkerPair: markers=(LFIB LMALL)
        BodyScale tibia_l: axes=(X Y Z)
      Measurement Foot_r: apply=true
        MarkerPair: markers=(RTOE RHEE)
        BodyScale talus_r: axes=(X Y Z)
        BodyScale calcn_r: axes=(X Y Z)
        BodyScale toes_r: axes=(X Y Z)
      Measurement Foot_l: apply=true
        MarkerPair: markers=(LTOE LHEE)
        BodyScale talus_l: axes=(X Y Z)
        BodyScale calcn_l: axes=(X Y Z)
        BodyScale toes_l: axes=(X Y Z)
      Measurement Hand_l: apply=true
        MarkerPair: markers=(LWRU LWRR)
        BodyScale hand_L: axes=(X Y Z)
  MarkerPlacer:
    apply: true
    marker_file: marker_experimental.trc
    time_range: 1 5
    max_marker_movement: -1
    IKTaskSet:
      IKMarkerTask RASI: apply=true weight=1.5
      IKMarkerTask SACROL: apply=false weight=1
      IKMarkerTask RTHOL: apply=false weight=1
      IKMarkerTask RTH2: apply=false weight=1
      IKMarkerTask RTH3: apply=false weight=1
      IKMarkerTask RKNEL: apply=true weight=0.7
      IKMarkerTask RKNEM: apply=true weight=0.3
      IKMarkerTask RSHAOL: apply=false weight=1
      IKMarkerTask RSHA2: apply=false weight=1
      IKMarkerTask RSHA3: apply=false weight=1
      IKMarkerTask RMALL: apply=true weight=1
      IKMarkerTask RMALM: apply=true weight=1
      IKMarkerTask RHEE: apply=true weight=1
      IKMarkerTask RM5: apply=false weight=1
      IKMarkerTask RTOE: apply=true weight=1
      IKMarkerTask LTHOL: apply=false weight=1
      IKMarkerTask LTH2: apply=false weight=1
      IKMarkerTask LTH3: apply=false weight=1
      IKMarkerTask LKNEL: apply=true weight=0.7
      IKMarkerTask LKNEM: apply=true weight=0.3
      IKMarkerTask LSHAOL: apply=false weight=1
      IKMarkerTask LSHA2: apply=false weight=1
      IKMarkerTask LSHA3: apply=false weight=1
      IKMarkerTask LMALL: apply=true weight=1
      IKMarkerTask LMALM: apply=true weight=1
      IKMarkerTask LHEE: apply=true weight=1
      IKMarkerTask LM5: apply=false weight=1
      IKMarkerTask LTOE: apply=true weight=1
      IKMarkerTask LASI: apply=true weight=1.5
      IKMarkerTask LACR: apply=true weight=1.5
      IKMarkerTask RACR: apply=true weight=1.5
      IKMarkerTask GLAB: apply=true weight=1
      IKMarkerTask RFHD: apply=true weight=1
      IKMarkerTask LFHD: apply=true weight=1
      IKMarkerTask C7: apply=true weight=1.5
      IKMarkerTask T6: apply=true weight=0.7
      IKMarkerTask T12: apply=true weight=0.7
      IKMarkerTask SPINMOL: apply=false weight=1
      IKMarkerTask SPINM2: apply=false weight=1
      IKMarkerTask SPINM3: apply=false weight=1
      IKMarkerTask SACR2: apply=false weight=1
      IKMarkerTask SACR3: apply=false weight=1
      IKMarkerTask STRN: apply=true weight=0.5
      IKMarkerTask XIPH: apply=false weight=0.5
      IKMarkerTask LUAOL: apply=false weight=1
      IKMarkerTask LUA2: apply=false weight=1
      IKMarkerTask LUA3: apply=false weight=1
      IKMarkerTask LLAOL: apply=false weight=1
      IKMarkerTask LLA2: apply=false weight=1
      IKMarkerTask LLA3: apply=false weight=1
      IKMarkerTask RUAOL: apply=false weight=1
      IKMarkerTask RUA2: apply=false weight=1
      IKMarkerTask RUA3: apply=false weight=1
      IKMarkerTask RLAOL: apply=false weight=1
      IKMarkerTask RLA2: apply=false weight=1
      IKMarkerTask RLA3: apply=false weight=1
      IKMarkerTask LPSI: apply=true weight=1
      IKMarkerTask RPSI: apply=false weight=1
      IKMarkerTask RCUBM: apply=true weight=0.7
      IKMarkerTask RCUBL: apply=false weight=0.7
      IKMarkerTask LCUBM: apply=true weight=0.7
      IKMarkerTask LCUBL: apply=false weight=0.7
      IKMarkerTask RWRU: apply=true weight=1
      IKMarkerTask RWRR: apply=false weight=0.7
      IKMarkerTask LWRU: apply=true weight=1
      IKMarkerTask LWRR: apply=false weight=0.7
      IKMarkerTask RFIB: apply=true weight=1
      IKMarkerTask LFIB: apply=true weight=1
