# OpenSim document version 40500
InverseKinematicsTool:
  model_file: ../athlete_1_scaled_increased_force_3.osim
  constraint_weight: Inf
  accuracy: 1e-5
  time_range: 8 9.3
  output_motion_file: ik.mot
  report_errors: true
  marker_file: markers_experimental.trc
  report_marker_locations: true
  IKTaskSet:
    IKMarkerTask FHD: apply=true weight=0.5
    IKMarkerTask LBHD: apply=true weight=0.5
    IKMarkerTask RBHD: apply=true weight=0.5
    IKMarkerTask C7: apply=true weight=0.5
    IKMarkerTask T10: apply=true weight=0.5
    IKMarkerTask CLAV: apply=false weight=0.5
    IKMarkerTask LSHO: apply=true weight=0.5
    IKMarkerTask LUUPA: apply=false weight=0.5
    IKMarkerTask LDUPA: apply=false weight=0.5
    IKMarkerTask LMUPA: apply=false weight=0.5
    IKMarkerTask LLEP: apply=false weight=0.5
    IKMarkerTask LMEP: apply=false weight=0.5
    IKMarkerTask LRAD: apply=false weight=0.5
    IKMarkerTask LUL: apply=false weight=0.5
    IKMarkerTask LRFIN: apply=false weight=0.5
    IKMarkerTask RSHO: apply=true weight=0.5
    IKMarkerTask RUUPA: apply=false weight=0.5
    IKMarkerTask RDUPA: apply=false weight=0.5
    IKMarkerTask RMUPA: apply=false weight=0.5
    IKMarkerTask RLEP: apply=false weight=0.5
    IKMarkerTask RMEP: apply=false weight=0.5
    IKMarkerTask RRAD: apply=false weight=0.5
    IKMarkerTask RUL: apply=false weight=0.5
    IKMarkerTask RUFIN: apply=false weight=0.5
    IKMarkerTask LASI: apply=false weight=0.5
    IKMarkerTask RASI: apply=false weight=0.5
    IKMarkerTask USACR: apply=true weight=8
    IKMarkerTask LSACR: apply=true weight=8
    IKMarkerTask RSACR: apply=true weight=8
    IKMarkerTask LHJC: apply=false weight=0.5
    IKMarkerTask LTHI1: apply=true weight=3.5
    IKMarkerTask LTHI4: apply=true weight=3.5
    IKMarkerTask LTHI2: apply=true weight=3.5
    IKMarkerTask LTHI3: apply=true weight=3.5
    IKMarkerTask LLFC: apply=false weight=0.5
    IKMarkerTask LMFC: apply=false weight=0.5
    IKMarkerTask LKJC: apply=false weight=0.5
    IKMarkerTask LTIB1: apply=true weight=0.5
    IKMarkerTask LTIB2: apply=true weight=0.5
    IKMarkerTask LTIB3: apply=true weight=0.5
    IKMarkerTask LTIB4: apply=true weight=0.5
    IKMarkerTask LLMAL: apply=false weight=0.5
    IKMarkerTask LMMAL: apply=false weight=0.5
    IKMarkerTask LAJC: apply=false weight=0.5
    IKMarkerTask LHEE: apply=true weight=5
    IKMarkerTask LMT1: apply=true weight=5
    IKMarkerTask LMT3: apply=true weight=5
    IKMarkerTask LMT5: apply=true weight=5
    IKMarkerTask RHJC: apply=false weight=0.5
    IKMarkerTask RTHI1: apply=true weight=4
    IKMarkerTask RTHI2: apply=true weight=4
    IKMarkerTask RTHI3: apply=true weight=4
    IKMarkerTask RTHI4: apply=true weight=4
    IKMarkerTask RLFC: apply=false weight=0.5
    IKMarkerTask RMFC: apply=false weight=0.5
    IKMarkerTask RKJC: apply=false weight=0.5
    IKMarkerTask RTIB1: apply=true weight=2
    IKMarkerTask RTIB2: apply=true weight=2
    IKMarkerTask RTIB3: apply=true weight=2
    IKMarkerTask RTIB4: apply=true weight=2
    IKMarkerTask RLMAL: apply=false weight=0.5
    IKMarkerTask RMMAL: apply=false weight=0.5
    IKMarkerTask RAJC: apply=false weight=0.5
    IKMarkerTask RHEE: apply=true weight=5
    IKMarkerTask RMT1: apply=true weight=5
    IKMarkerTask RMT3: apply=true weight=5
    IKMarkerTask RMT5: apply=true weight=5
    IKCoordinateTask [values shared by the 11 below unless stated]: apply=false weight=0.1 value_type=default_value
        value=0
    IKCoordinateTask hip_flexion_r
    IKCoordinateTask hip_adduction_r
    IKCoordinateTask hip_rotation_r
    IKCoordinateTask knee_angle_r
    IKCoordinateTask ankle_angle_r
    IKCoordinateTask hip_flexion_l
    IKCoordinateTask hip_adduction_l
    IKCoordinateTask hip_rotation_l
    IKCoordinateTask knee_angle_l
    IKCoordinateTask ankle_angle_l
    IKCoordinateTask mtp_angle_l: weight=1
