# OpenSim document version 40500
AnalyzeTool athlete_1_scaled_increased_force_3:
  model_file: /Users/marcelhacker/Documents/opensim-deadlift-techniques/simulations/athlete_1_increased_force_3/conv_dl_1/../athlete_1_increased_force_3.osim
  replace_force_set: false
  force_set_files: actuators_so.xml
  results_directory: .
  output_precision: 8
  initial_time: 7.4
  final_time: 8.9
  solve_for_equilibrium_for_auxiliary_states: false
  maximum_number_of_integrator_steps: 20000
  maximum_integrator_step_size: 1
  minimum_integrator_step_size: 1e-8
  integrator_error_tolerance: 1e-5
  external_loads_file: grf.xml
  coordinates_file: ik.mot
  lowpass_cutoff_frequency_for_coordinates: 6
  AnalysisSet Analyses:
    StaticOptimization: on=false start_time=7.4 end_time=8.9 step_interval=1 in_degrees=true use_model_force_set=true
        activation_exponent=2 use_muscle_physiology=true optimizer_convergence_criterion=0.0001
        optimizer_max_iterations=100
    MuscleAnalysis: start_time=7.4 end_time=8.9 step_interval=1 in_degrees=true muscle_list=all
        moment_arm_coordinate_list=all compute_moments=true
