# OpenSim document version 40500
AnalyzeTool Athlete_3_scaled:
  replace_force_set: false
  force_set_files: IAA_Actuators_FAI.xml
  results_directory: ../../athlete_3_increased_force_3
  output_precision: 20
  initial_time: 9
  final_time: 11
  solve_for_equilibrium_for_auxiliary_states: false
  maximum_number_of_integrator_steps: 20000
  maximum_integrator_step_size: 1
  minimum_integrator_step_size: 1e-8
  integrator_error_tolerance: 1e-5
  external_loads_file: grf.xml
  coordinates_file: ik.mot
  lowpass_cutoff_frequency_for_coordinates: 6
  AnalysisSet Analyses:
    InducedAccelerations: start_time=9 end_time=11 step_interval=1 in_degrees=true body_names=center_of_mass
        force_threshold=6 [N] compute_potentials_only=false report_constraint_reactions=false
  ControllerSet Controllers:
    ControlSetController: controls_file=_StaticOptimization_controls.xml
