# OpenSim document version 40500
ExternalLoads:
  datafile: grf.mot
  external_loads_model_kinematics_file: ik.mot
  lowpass_cutoff_frequency_for_load_kinematics: 7
  ExternalForce externalforce_1: applied_to_body=ground force_expressed_in_body=ground force_identifier=ground_force3
      point_identifier=p1 torque_identifier=m1
  ExternalForce externalforce_2: applied_to_body=ground force_expressed_in_body=ground force_identifier=f2
      point_identifier=p2 torque_identifier=m2
  ExternalForce externalforce_3: applied_to_body=calcn_l force_expressed_in_body=ground force_identifier=f3
      point_identifier=p3 torque_identifier=m3
  ExternalForce externalforce_4: applied_to_body=calcn_r force_expressed_in_body=ground force_identifier=f4
      point_identifier=p4 torque_identifier=m4
  ExternalForce externalforce_5: force_expressed_in_body=ground force_identifier=f5 point_identifier=p5
      torque_identifier=m5
